FINISH   !退出当前处理器
/CLEAR,START
/PREP7
ET,1,LINK1
R,1,0.1
MP,EX,1,1E5
MP,PRXY,1,0.3
N,1,0,0
N,2,1,0
N,3,0.5,0.5
E,1,3
E,2,3
/PLOPTS.INFO,0
FINISH
/SOLU
D,1,ALL
D,2,ALL
F,3,FY,-100
*DO,I,1,10
TIME,i
SOLVE
MP,EX,1,1E5-1000*i*i
*ENDDO
FINISH
/POST26
NSOL,2,3,U,Y,y_disp
ABS,3,2,,,,,,1,
PLVAR,3
/IMAGE,SAVE,uy_disp,BMP
FINISH
